*Heading
** Job name: columnc_cyclic_loading_axial_load Model name: Model-1
** Generated by: Abaqus/CAE 2021.HF4
*Preprint, echo=NO, model=NO, history=NO, contact=NO
**
** PARTS
**
*Part, name=Part-1
*Node
      1,         125.,        2020.,         125.
      2,         125.,        2060.,         125.
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*Element, type=C3D8R
  1,   194,  3473, 21217,  3403,     1,   145,  3361,   164
  2,  3473,  3474, 21218, 21217,   145,   146,  3362,  3361
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*Nset, nset=_PickedSet59, internal, generate
     1,  41250,      1
*Elset, elset=_PickedSet59, internal, generate
     1,  32272,      1
** Section: Section-1
*Solid Section, elset=_PickedSet59, controls=EC-1, material=Material-1
,
*End Part
**
**
** ASSEMBLY
**
*Assembly, name=Assembly
**
*Instance, name=Part-1-1, part=Part-1
*End Instance
**
*Node
      1,           0.,        2110.,         275.
*Nset, nset=_PickedSet35, internal
 1,
*Nset, nset=_PickedSet36, internal, instance=Part-1-1
    21,    24,    27,    28,    29,    32
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*Elset, elset=_PickedSet36, internal, instance=Part-1-1
   625,   629,   633,   637,   641,   645
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*Nset, nset=_PickedSet37, internal
 1,
*Nset, nset=_PickedSet38, internal
 1,
*Elset, elset=__PickedSurf34_S6, internal, instance=Part-1-1
   193,   197,   201,   205,   209,   213
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*Elset, elset=__PickedSurf34_S4, internal, instance=Part-1-1
     4,     8,    12,    16,    20,    24
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*Elset, elset=__PickedSurf34_S5, internal, instance=Part-1-1
   313,   314,   315,   316,   317,   318
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*Elset, elset=__PickedSurf34_S3, internal, instance=Part-1-1
 18897, 18898, 18899, 18900, 18901, 18902
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*Elset, elset=__PickedSurf34_S1, internal, instance=Part-1-1, generate
 2429,  2464,     1
*Surface, type=ELEMENT, name=_PickedSurf34, internal
__PickedSurf34_S6, S6
__PickedSurf34_S4, S4
__PickedSurf34_S5, S5
__PickedSurf34_S3, S3
__PickedSurf34_S1, S1
** Constraint: Constraint-1
*Coupling, constraint name=Constraint-1, ref node=_PickedSet35, surface=_PickedSurf34
*Kinematic
1, 1
2, 2
3, 3
4, 4
5, 5
6, 6
*End Assembly
**
** ELEMENT CONTROLS
**
*Section Controls, name=EC-1, hourglass=ENHANCED
1., 1., 1.
*Amplitude, name=Amp-1
             0.,              0.,              1.,             25.,              2.,              0.,              3.,            -25.
             4.,              0.,              5.,             25.,              6.,              0.,              7.,            -25.
             8.,              0.,              9.,             25.,             10.,              0.,             11.,            -25.
            12.,              0.,             13.,             50.,             14.,              0.,             15.,            -50.
            16.,              0.,             17.,             50.,             18.,              0.,             19.,            -50.
            20.,              0.,             21.,             50.,             22.,              0.,             23.,            -50.
            24.,              0.,             25.,             75.,             26.,              0.,             27.,            -75.
            28.,              0.,             29.,             75.,             30.,              0.,             31.,            -75.
            32.,              0.,             33.,             75.,             34.,              0.,             35.,            -75.
            36.,              0.,             37.,            100.,             38.,              0.,             39.,           -100.
            40.,              0.,             41.,            100.,             42.,              0.,             43.,           -100.
            44.,              0.,             45.,            100.,             46.,              0.,             47.,           -100.
            48.,              0.,             49.,            150.,             50.,              0.,             51.,           -150.
            52.,              0.,             53.,            150.,             54.,              0.,             55.,           -150.
            56.,              0.,             57.,            150.,             58.,              0.,             59.,           -150.
            60.,              0.
**
** MATERIALS
**
*Material, name=Material-1
*Depvar
     43,
*User Material, constants=23
204255.,      0.3,    799.8,     0.01,    247.8,     7.67,    249.8,  1.47423
  418.297,  3581.09,  345.849,  41.2537, 0.283578, 0.362196, 0.354226,    5000.
     1.49,    0.051,    -380.,     -55.,    -101.,  178308.,     95.5
**
** BOUNDARY CONDITIONS
**
** Name: BC-1 Type: Displacement/Rotation
*Boundary
_PickedSet36, 1, 1
_PickedSet36, 2, 2
_PickedSet36, 3, 3
** ----------------------------------------------------------------
**
** STEP: Step-1
**
*Step, name=Step-1, nlgeom=YES, inc=1000
*Static
0.001, 1., 1e-05, 0.1
**
** LOADS
**
** Name: Load-1   Type: Concentrated force
*Cload
_PickedSet38, 2, -3.336e+06
**
** OUTPUT REQUESTS
**
*Restart, write, frequency=0
**
** FIELD OUTPUT: F-Output-1
**
*Output, field
*Node Output
CF, RF, U
*Element Output, directions=YES
LE, PE, PEEQ, PEMAG, S, SDV
*Contact Output
CDISP, CSTRESS
**
** HISTORY OUTPUT: H-Output-1
**
*Output, history, variable=PRESELECT
*End Step
** ----------------------------------------------------------------
**
** STEP: Step-2
**
*Step, name=Step-2, nlgeom=YES, inc=100000
*Static
0.001, 60., 1e-05, 0.05
**
** BOUNDARY CONDITIONS
**
** Name: BC-2 Type: Displacement/Rotation
*Boundary, amplitude=Amp-1
_PickedSet37, 1, 1, 1.
_PickedSet37, 3, 3
_PickedSet37, 4, 4
_PickedSet37, 5, 5
_PickedSet37, 6, 6
**
** OUTPUT REQUESTS
**
*Restart, write, frequency=0
**
** FIELD OUTPUT: F-Output-1
**
*Output, field
*Node Output
CF, RF, U
*Element Output, directions=YES
LE, PE, PEEQ, PEMAG, S, SDV
*Contact Output
CDISP, CSTRESS
**
** HISTORY OUTPUT: H-Output-1
**
*Output, history, variable=PRESELECT
*End Step
