*Heading
** Job name: single_element_test_cyclic Model name: Model-2
** Generated by: Abaqus/CAE 2021.HF4
*Preprint, echo=NO, model=NO, history=NO, contact=NO
**
** PARTS
**
*Part, name=Part-1
*Node
      1,           1.,           1.,           1.
      2,           1.,           0.,           1.
      3,           1.,           1.,           0.
      4,           1.,           0.,           0.
      5,           0.,           1.,           1.
      6,           0.,           0.,           1.
      7,           0.,           1.,           0.
      8,           0.,           0.,           0.
*Element, type=C3D8R
1, 5, 6, 8, 7, 1, 2, 4, 3
*Nset, nset=_PickedSet2, internal, generate
 1,  8,  1
*Elset, elset=_PickedSet2, internal
 1,
** Section: Section-1
*Solid Section, elset=_PickedSet2, controls=EC-1, material=Material-1
,
*End Part
**
**
** ASSEMBLY
**
*Assembly, name=Assembly
**
*Instance, name=Part-1-1, part=Part-1
*End Instance
**
*Nset, nset=_PickedSet4, internal, instance=Part-1-1, generate
 5,  8,  1
*Nset, nset=_PickedSet5, internal, instance=Part-1-1, generate
 2,  8,  2
*Nset, nset=_PickedSet6, internal, instance=Part-1-1
 3, 4, 7, 8
*Nset, nset=_PickedSet7, internal, instance=Part-1-1, generate
 1,  7,  2
*End Assembly
**
** ELEMENT CONTROLS
**
*Section Controls, name=EC-1, hourglass=ENHANCED
1., 1., 1.
*Amplitude, name=Amp-1
             0.,              0.,              1.,     0.010050167,              2.,              0.,              3.,    -0.009950166
             4.,              0.,              5.,     0.010050167,              6.,              0.,              7.,    -0.009950166
             8.,              0.,              9.,     0.010050167,             10.,              0.,             11.,    -0.009950166
            12.,              0.,             13.,     0.010050167,             14.,              0.,             15.,    -0.009950166
            16.,              0.,             17.,     0.010050167,             18.,              0.,             19.,    -0.009950166
            20.,              0.,             21.,     0.010050167,             22.,              0.,             23.,    -0.009950166
            24.,              0.,             25.,     0.010050167,             26.,              0.,             27.,    -0.009950166
            28.,              0.,             29.,     0.010050167,             30.,              0.,             31.,    -0.009950166
            32.,              0.,             33.,     0.010050167,             34.,              0.,             35.,    -0.009950166
            36.,              0.,             37.,     0.010050167,             38.,              0.,             39.,    -0.009950166
            40.,              0.,             41.,      0.02020134,             42.,              0.,             43.,    -0.019801327
            44.,              0.,             45.,      0.02020134,             46.,              0.,             47.,    -0.019801327
            48.,              0.,             49.,      0.02020134,             50.,              0.,             51.,    -0.019801327
            52.,              0.,             53.,      0.02020134,             54.,              0.,             55.,    -0.019801327
            56.,              0.,             57.,      0.02020134,             58.,              0.,             59.,    -0.019801327
            60.,              0.,             61.,      0.02020134,             62.,              0.,             63.,    -0.019801327
            64.,              0.,             65.,      0.02020134,             66.,              0.,             67.,    -0.019801327
            68.,              0.,             69.,      0.02020134,             70.,              0.,             71.,    -0.019801327
            72.,              0.,             73.,      0.02020134,             74.,              0.,             75.,    -0.019801327
            76.,              0.,             77.,      0.02020134,             78.,              0.,             79.,    -0.019801327
            80.,              0.,             81.,     0.030454534,             82.,              0.,             83.,    -0.029554466
            84.,              0.,             85.,     0.030454534,             86.,              0.,             87.,    -0.029554466
            88.,              0.,             89.,     0.030454534,             90.,              0.,             91.,    -0.029554466
            92.,              0.,             93.,     0.030454534,             94.,              0.,             95.,    -0.029554466
            96.,              0.,             97.,     0.030454534,             98.,              0.,             99.,    -0.029554466
           100.,              0.,            101.,     0.030454534,            102.,              0.,            103.,    -0.029554466
           104.,              0.,            105.,     0.030454534,            106.,              0.,            107.,    -0.029554466
           108.,              0.,            109.,     0.030454534,            110.,              0.,            111.,    -0.029554466
           112.,              0.,            113.,     0.030454534,            114.,              0.,            115.,    -0.029554466
           116.,              0.,            117.,     0.030454534,            118.,              0.,            119.,    -0.029554466
           120.,              0.,            121.,     0.040810774,            122.,              0.,            123.,    -0.039210561
           124.,              0.,            125.,     0.040810774,            126.,              0.,            127.,    -0.039210561
           128.,              0.,            129.,     0.040810774,            130.,              0.,            131.,    -0.039210561
           132.,              0.,            133.,     0.040810774,            134.,              0.,            135.,    -0.039210561
           136.,              0.,            137.,     0.040810774,            138.,              0.,            139.,    -0.039210561
           140.,              0.,            141.,     0.040810774,            142.,              0.,            143.,    -0.039210561
           144.,              0.,            145.,     0.040810774,            146.,              0.,            147.,    -0.039210561
           148.,              0.,            149.,     0.040810774,            150.,              0.,            151.,    -0.039210561
           152.,              0.,            153.,     0.040810774,            154.,              0.,            155.,    -0.039210561
           156.,              0.,            157.,     0.040810774,            158.,              0.,            159.,    -0.039210561
           160.,              0.,            161.,     0.051271096,            162.,              0.,            163.,    -0.048770575
           164.,              0.,            165.,     0.051271096,            166.,              0.,            167.,    -0.048770575
           168.,              0.,            169.,     0.051271096,            170.,              0.,            171.,    -0.048770575
           172.,              0.,            173.,     0.051271096,            174.,              0.,            175.,    -0.048770575
           176.,              0.,            177.,     0.051271096,            178.,              0.,            179.,    -0.048770575
           180.,              0.,            181.,     0.051271096,            182.,              0.,            183.,    -0.048770575
           184.,              0.,            185.,     0.051271096,            186.,              0.,            187.,    -0.048770575
           188.,              0.,            189.,     0.051271096,            190.,              0.,            191.,    -0.048770575
           192.,              0.,            193.,     0.051271096,            194.,              0.,            195.,    -0.048770575
           196.,              0.,            197.,     0.051271096,            198.,              0.,            199.,    -0.048770575
           200.,              0.
**
** MATERIALS
**
*Material, name=Material-1
*Depvar
     43,
*User Material, constants=23
204255.,      0.3,    799.8,     0.01,    247.8,     7.67,    249.8,  1.47423
  418.297,  3581.09,  345.849,  41.2537, 0.283578, 0.362196, 0.354226,    5000.
     1.49,    0.051,    -380.,     -55.,    -101.,  178308.,     95.5
**
** BOUNDARY CONDITIONS
**
** Name: BC-1 Type: Displacement/Rotation
*Boundary
_PickedSet4, 1, 1
** Name: BC-2 Type: Displacement/Rotation
*Boundary
_PickedSet5, 2, 2
** Name: BC-3 Type: Displacement/Rotation
*Boundary
_PickedSet6, 3, 3
** ----------------------------------------------------------------
**
** STEP: Step-1
**
*Step, name=Step-1, nlgeom=YES, inc=100000
*Static
0.001, 200., 1e-07, 0.01
**
** BOUNDARY CONDITIONS
**
** Name: BC-4 Type: Displacement/Rotation
*Boundary, amplitude=Amp-1
_PickedSet7, 2, 2, 1.
**
** OUTPUT REQUESTS
**
*Restart, write, frequency=0
**
** FIELD OUTPUT: F-Output-1
**
*Output, field
*Node Output
CF, RF, U
*Element Output, directions=YES
LE, PE, PEEQ, PEMAG, S, SDV
*Contact Output
CDISP, CSTRESS
**
** HISTORY OUTPUT: H-Output-1
**
*Output, history, variable=PRESELECT
*End Step
